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/batch
! ANSYS input file written by Workbench version 2024 R2
! File used for geometry attach: C:\Users\butte\OneDrive\Documents\GitHub\vandymotorsports\Chassis\Torsional Analysis\Torsional_Analysis_files\dp0\SYS\DM\SYS.scdocx
/title,Torsional_Analysis--Static Structural (A5)
/COM,/COM,     ANSYSMotion, 2024.2
/com,--- Data in consistent BIN units. See Solving Units in the help system for more information.
/units,BIN
/prep7
! Turn off shape checking because checks already performed inside WB mesher.
! See help system for more information.
SHPP,OFF,,NOWARN
etcon,set             ! allow ANSYS to choose best KEYOP's for 180x elements, resets any applicable keyopt to MAPDL defaults
/com,*********** Nodes for the whole assembly ***********
nblock,3,,789
(1i9,3e20.9e3)
        1     1.987886575E+01     1.029940429E+01    -2.337454341E+01
        2     8.295000000E+00     8.082493710E+00    -1.662500000E+01
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-1
/com,*********** Nodes for all Remote Points ***********
nblock,3
(1i9,3e20.9e3)
      719     2.105030355E+01     2.000000000E+00    -2.178858768E+01
      720    -2.105030355E+01     2.000000000E+00    -2.178858768E+01
      721     2.185478395E-15     2.000000000E+00    -2.178858768E+01
      722     1.880509182E+01     1.961270815E+00    -8.327667923E+01
      723    -1.880509182E+01     1.961270815E+00    -8.327667923E+01
-1
/com,*********** Elements for Body 1 'Beam (Extracted Profile2)' ***********
et,1,188
keyo,1,3,2
eblock,19,solid,,4
(19i9)
        1        1        1        1        0        0        0        0        3        0       67       69       71      401
        1        1        1        1        0        0        0        0        3        0       68       71       70      402
        1        1        1        1        0        0        0        0        3        0       69       70       72      403
        1        1        1        1        0        0        0        0        3        0       70       72       50      404
-1
/com,*********** Elements for Body 2 'Beam (Extracted Profile2)' ***********
et,2,188
keyo,2,3,2
eblock,19,solid,,4
(19i9)
        2        2        2        2        0        0        0        0        3        0       71       73       75      405
        2        2        2        2        0        0        0        0        3        0       72       75       74      406
        2        2        2        2        0        0        0        0        3        0       73       47       76      407
        2        2        2        2        0        0        0        0        3        0       74       76       73      408
-1
/com,*********** Elements for Body 3 'Beam (Extracted Profile19)' ***********
et,3,188
keyo,3,3,2
eblock,19,solid,,3
(19i9)
        3        3        3        3        0        0        0        0        3        0       75       77       79      409
        3        3        3        3        0        0        0        0        3        0       76       79       80      410
        3        3        3        3        0        0        0        0        3        0       77       80       78      411
-1
/com,*********** Elements for Body 4 'Beam (Extracted Profile4)' ***********
et,4,188
keyo,4,3,2
eblock,19,solid,,3
(19i9)
        4        4        4        4        0        0        0        0        3        0       78       81       83      412
        4        4        4        4        0        0        0        0        3        0       79       83       84      413
        4        4        4        4        0        0        0        0        3        0       80       84       82      414
-1
/com,*********** Elements for Body 5 'Beam (Extracted Profile4)' ***********
et,5,188
keyo,5,3,2
eblock,19,solid,,23
(19i9)
        5        5        5        5        0        0        0        0        3        0       81       85       86      415
        5        5        5        5        0        0        0        0        3        0       82       86       87      416
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-1
/com,*********** Elements for Body 6 'Beam (Extracted Profile4)' ***********
et,6,188
keyo,6,3,2
eblock,19,solid,,3
(19i9)
        6        6        6        6        0        0        0        0        3        0      104      107      109      438
        6        6        6        6        0        0        0        0        3        0      105      109      110      439
        6        6        6        6        0        0        0        0        3        0      106      110      108      440
-1
/com,*********** Elements for Body 7 'Beam (Extracted Profile5)' ***********
et,7,188
keyo,7,3,2
eblock,19,solid,,11
(19i9)
        7        7        7        7        0        0        0        0        3        0      107      111      112      441
        7        7        7        7        0        0        0        0        3        0      108      112      113      442
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-1
/com,*********** Elements for Body 8 'Beam (Extracted Profile5)' ***********
et,8,188
keyo,8,3,2
eblock,19,solid,,11
(19i9)
        8        8        8        8        0        0        0        0        3        0      118      107      122      452
        8        8        8        8        0        0        0        0        3        0      119      122      123      453
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-1
/com,*********** Elements for Body 9 'Beam (Extracted Profile5)' ***********
et,9,188
keyo,9,3,2
eblock,19,solid,,3
(19i9)
        9        9        9        9        0        0        0        0        3        0      129      131      133      463
        9        9        9        9        0        0        0        0        3        0      130      133      134      464
        9        9        9        9        0        0        0        0        3        0      131      134      132      465
-1
/com,*********** Elements for Body 10 'Beam (Extracted Profile3)' ***********
et,10,188
keyo,10,3,2
eblock,19,solid,,42
(19i9)
       10       10       10       10        0        0        0        0        3        0      132      108      136      466
       10       10       10       10        0        0        0        0        3        0      133      136      137      467
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-1
/com,*********** Elements for Body 11 'Beam (Extracted Profile3)' ***********
et,11,188
keyo,11,3,2
eblock,19,solid,,9
(19i9)
       11       11       11       11        0        0        0        0        3        0      174       95      177      508
       11       11       11       11        0        0        0        0        3        0      175      177      178      509
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-1
/com,*********** Elements for Body 12 'Beam (Extracted Profile3)' ***********
et,12,188
keyo,12,3,2
eblock,19,solid,,9
(19i9)
       12       12       12       12        0        0        0        0        3        0      183       85      186      517
       12       12       12       12        0        0        0        0        3        0      184      186      187      518
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-1
/com,*********** Elements for Body 13 'Beam (Extracted Profile3)' ***********
et,13,188
keyo,13,3,2
eblock,19,solid,,6
(19i9)
       13       13       13       13        0        0        0        0        3        0      192       77      195      526
       13       13       13       13        0        0        0        0        3        0      193      195      196      527
       13       13       13       13        0        0        0        0        3        0      194      196      197      528
       13       13       13       13        0        0        0        0        3        0      195      197      198      529
       13       13       13       13        0        0        0        0        3        0      196      198      199      530
       13       13       13       13        0        0        0        0        3        0      197      199      194      531
-1
/com,*********** Elements for Body 14 'Beam (Extracted Profile3)' ***********
et,14,188
keyo,14,3,2
eblock,19,solid,,6
(19i9)
       14       14       14       14        0        0        0        0        3        0      198       78      201      532
       14       14       14       14        0        0        0        0        3        0      199      201      202      533
       14       14       14       14        0        0        0        0        3        0      200      202      203      534
       14       14       14       14        0        0        0        0        3        0      201      203      204      535
       14       14       14       14        0        0        0        0        3        0      202      204      205      536
       14       14       14       14        0        0        0        0        3        0      203      205      200      537
-1
/com,*********** Elements for Body 15 'Beam (Extracted Profile6)' ***********
et,15,188
keyo,15,3,2
eblock,19,solid,,90
(19i9)
       15       15       15       15        0        0        0        0        3        0      204      163      206      538
       15       15       15       15        0        0        0        0        3        0      205      206      207      539
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-1
/com,*********** Elements for Body 16 'Beam (Extracted Profile6)' ***********
et,16,188
keyo,16,3,2
eblock,19,solid,,6
(19i9)
       16       16       16       16        0        0        0        0        3        0      294       78      271      628
       16       16       16       16        0        0        0        0        3        0      295      271      272      629
       16       16       16       16        0        0        0        0        3        0      296      272      273      630
       16       16       16       16        0        0        0        0        3        0      297      273      274      631
       16       16       16       16        0        0        0        0        3        0      298      274      275      632
       16       16       16       16        0        0        0        0        3        0      299      275      118      633
-1
/com,*********** Elements for Body 17 'Beam (Extracted Profile6)' ***********
et,17,188
keyo,17,3,2
eblock,19,solid,,3
(19i9)
       17       17       17       17        0        0        0        0        3        0      300      100      276      634
       17       17       17       17        0        0        0        0        3        0      301      276      277      635
       17       17       17       17        0        0        0        0        3        0      302      277       93      636
-1
/com,*********** Elements for Body 18 'Beam (Extracted Profile7)' ***********
et,18,188
keyo,18,3,2
eblock,19,solid,,3
(19i9)
       18       18       18       18        0        0        0        0        3        0      303      278      279      637
       18       18       18       18        0        0        0        0        3        0      304      279      280      638
       18       18       18       18        0        0        0        0        3        0      305      280       82      639
-1
/com,*********** Elements for Body 19 'Beam (Extracted Profile10)' ***********
et,19,188
keyo,19,3,2
eblock,19,solid,,3
(19i9)
       19       19       19       19        0        0        0        0        3        0      306      281      282      640
       19       19       19       19        0        0        0        0        3        0      307      282      283      641
       19       19       19       19        0        0        0        0        3        0      308      283      107      642
-1
/com,*********** Elements for Body 20 'Beam (Extracted Profile11)' ***********
et,20,188
keyo,20,3,2
eblock,19,solid,,35
(19i9)
       20       20       20       20        0        0        0        0        3        0      309      284      286      643
       20       20       20       20        0        0        0        0        3        0      310      286      285      644
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-1
/com,*********** Elements for Body 21 'Beam (Extracted Profile11)' ***********
et,21,188
keyo,21,3,2
eblock,19,solid,,21
(19i9)
       21       21       21       21        0        0        0        0        3        0      344      311      121      678
       21       21       21       21        0        0        0        0        3        0      345      141      121      679
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-1
/com,*********** Elements for Body 22 'Beam (Extracted Profile13)' ***********
et,22,188
keyo,22,3,2
eblock,19,solid,,7
(19i9)
       22       22       22       22        0        0        0        0        3        0      365      101      323      699
       22       22       22       22        0        0        0        0        3        0      366      323       85      700
       22       22       22       22        0        0        0        0        3        0      367      101      324      701
       22       22       22       22        0        0        0        0        3        0      368      324       47      702
       22       22       22       22        0        0        0        0        3        0      369       93      325      703
       22       22       22       22        0        0        0        0        3        0      370      325      326      704
       22       22       22       22        0        0        0        0        3        0      371      326       47      705
-1
/com,*********** Elements for Body 23 'Beam (Extracted Profile13)' ***********
et,23,188
keyo,23,3,2
eblock,19,solid,,4
(19i9)
       23       23       23       23        0        0        0        0        3        0      372       91      327      706
       23       23       23       23        0        0        0        0        3        0      373      327       50      707
       23       23       23       23        0        0        0        0        3        0      374       95      328      708
       23       23       23       23        0        0        0        0        3        0      375      328       91      709
-1
/com,*********** Elements for Body 24 'Beam (Extracted Profile16)' ***********
et,24,188
keyo,24,3,2
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et,25,188
keyo,25,3,2
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et,26,188
keyo,26,3,2
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et,27,188
keyo,27,3,2
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et,28,188
keyo,28,3,2
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et,29,188
keyo,29,3,2
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et,30,188
keyo,30,3,2
eblock,19,solid,,14
(19i9)
       30       30       30       30        0        0        0        0        3        0        1        1        3      335
       30       30       30       30        0        0        0        0        3        0        2        3        4      336
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-1
/com,*********** Send User Defined Coordinate System(s) ***********
local,12,0,0.,2.,-56.,0.,0.,0.
csys,0
toffst,459.67,      ! Temperature offset from absolute zero
/com,*********** Set Reference Temperature ***********
tref,71.6
/com,*********** Send Materials ***********
Temperature = 'TEMP' ! Temperature
MP,DENS,1,0.000734544492879577,	! slinch in^-3
MP,ALPX,1,6.66666666666667e-06,	! F^-1
MP,C,1,373722.969668162,	! in^2 s^-2 F^-1
MP,KXX,1,7.55607836445752,	! slinch in s^-3 F^-1
MP,RSVX,1,8.52348993288591,	! ohm cmil in^-1
MP,EX,1,29007547.5428236,	! slinch s^-2 in^-1
MP,NUXY,1,0.3,
MP,MURX,1,10000,

Temperature = 'TEMP' ! Temperature
MP,DENS,2,0.000734544492879577,	! slinch in^-3
MP,ALPX,2,6.66666666666667e-06,	! F^-1
MP,C,2,373722.969668162,	! in^2 s^-2 F^-1
MP,KXX,2,7.55607836445752,	! slinch in s^-3 F^-1
MP,RSVX,2,8.52348993288591,	! ohm cmil in^-1
MP,EX,2,29007547.5428236,	! slinch s^-2 in^-1
MP,NUXY,2,0.3,
MP,MURX,2,10000,

Temperature = 'TEMP' ! Temperature
MP,DENS,3,0.000734544492879577,	! slinch in^-3
MP,ALPX,3,6.66666666666667e-06,	! F^-1
MP,C,3,373722.969668162,	! in^2 s^-2 F^-1
MP,KXX,3,7.55607836445752,	! slinch in s^-3 F^-1
MP,RSVX,3,8.52348993288591,	! ohm cmil in^-1
MP,EX,3,29007547.5428236,	! slinch s^-2 in^-1
MP,NUXY,3,0.3,
MP,MURX,3,10000,

Temperature = 'TEMP' ! Temperature
MP,DENS,4,0.000734544492879577,	! slinch in^-3
MP,ALPX,4,6.66666666666667e-06,	! F^-1
MP,C,4,373722.969668162,	! in^2 s^-2 F^-1
MP,KXX,4,7.55607836445752,	! slinch in s^-3 F^-1
MP,RSVX,4,8.52348993288591,	! ohm cmil in^-1
MP,EX,4,29007547.5428236,	! slinch s^-2 in^-1
MP,NUXY,4,0.3,
MP,MURX,4,10000,

Temperature = 'TEMP' ! Temperature
MP,DENS,5,0.000734544492879577,	! slinch in^-3
MP,ALPX,5,6.66666666666667e-06,	! F^-1
MP,C,5,373722.969668162,	! in^2 s^-2 F^-1
MP,KXX,5,7.55607836445752,	! slinch in s^-3 F^-1
MP,RSVX,5,8.52348993288591,	! ohm cmil in^-1
MP,EX,5,29007547.5428236,	! slinch s^-2 in^-1
MP,NUXY,5,0.3,
MP,MURX,5,10000,

Temperature = 'TEMP' ! Temperature
MP,DENS,6,0.000734544492879577,	! slinch in^-3
MP,ALPX,6,6.66666666666667e-06,	! F^-1
MP,C,6,373722.969668162,	! in^2 s^-2 F^-1
MP,KXX,6,7.55607836445752,	! slinch in s^-3 F^-1
MP,RSVX,6,8.52348993288591,	! ohm cmil in^-1
MP,EX,6,29007547.5428236,	! slinch s^-2 in^-1
MP,NUXY,6,0.3,
MP,MURX,6,10000,

Temperature = 'TEMP' ! Temperature
MP,DENS,7,0.000734544492879577,	! slinch in^-3
MP,ALPX,7,6.66666666666667e-06,	! F^-1
MP,C,7,373722.969668162,	! in^2 s^-2 F^-1
MP,KXX,7,7.55607836445752,	! slinch in s^-3 F^-1
MP,RSVX,7,8.52348993288591,	! ohm cmil in^-1
MP,EX,7,29007547.5428236,	! slinch s^-2 in^-1
MP,NUXY,7,0.3,
MP,MURX,7,10000,

Temperature = 'TEMP' ! Temperature
MP,DENS,8,0.000734544492879577,	! slinch in^-3
MP,ALPX,8,6.66666666666667e-06,	! F^-1
MP,C,8,373722.969668162,	! in^2 s^-2 F^-1
MP,KXX,8,7.55607836445752,	! slinch in s^-3 F^-1
MP,RSVX,8,8.52348993288591,	! ohm cmil in^-1
MP,EX,8,29007547.5428236,	! slinch s^-2 in^-1
MP,NUXY,8,0.3,
MP,MURX,8,10000,

Temperature = 'TEMP' ! Temperature
MP,DENS,9,0.000734544492879577,	! slinch in^-3
MP,ALPX,9,6.66666666666667e-06,	! F^-1
MP,C,9,373722.969668162,	! in^2 s^-2 F^-1
MP,KXX,9,7.55607836445752,	! slinch in s^-3 F^-1
MP,RSVX,9,8.52348993288591,	! ohm cmil in^-1
MP,EX,9,29007547.5428236,	! slinch s^-2 in^-1
MP,NUXY,9,0.3,
MP,MURX,9,10000,

Temperature = 'TEMP' ! Temperature
MP,DENS,10,0.000734544492879577,	! slinch in^-3
MP,ALPX,10,6.66666666666667e-06,	! F^-1
MP,C,10,373722.969668162,	! in^2 s^-2 F^-1
MP,KXX,10,7.55607836445752,	! slinch in s^-3 F^-1
MP,RSVX,10,8.52348993288591,	! ohm cmil in^-1
MP,EX,10,29007547.5428236,	! slinch s^-2 in^-1
MP,NUXY,10,0.3,
MP,MURX,10,10000,

Temperature = 'TEMP' ! Temperature
MP,DENS,11,0.000734544492879577,	! slinch in^-3
MP,ALPX,11,6.66666666666667e-06,	! F^-1
MP,C,11,373722.969668162,	! in^2 s^-2 F^-1
MP,KXX,11,7.55607836445752,	! slinch in s^-3 F^-1
MP,RSVX,11,8.52348993288591,	! ohm cmil in^-1
MP,EX,11,29007547.5428236,	! slinch s^-2 in^-1
MP,NUXY,11,0.3,
MP,MURX,11,10000,

Temperature = 'TEMP' ! Temperature
MP,DENS,12,0.000734544492879577,	! slinch in^-3
MP,ALPX,12,6.66666666666667e-06,	! F^-1
MP,C,12,373722.969668162,	! in^2 s^-2 F^-1
MP,KXX,12,7.55607836445752,	! slinch in s^-3 F^-1
MP,RSVX,12,8.52348993288591,	! ohm cmil in^-1
MP,EX,12,29007547.5428236,	! slinch s^-2 in^-1
MP,NUXY,12,0.3,
MP,MURX,12,10000,

Temperature = 'TEMP' ! Temperature
MP,DENS,13,0.000734544492879577,	! slinch in^-3
MP,ALPX,13,6.66666666666667e-06,	! F^-1
MP,C,13,373722.969668162,	! in^2 s^-2 F^-1
MP,KXX,13,7.55607836445752,	! slinch in s^-3 F^-1
MP,RSVX,13,8.52348993288591,	! ohm cmil in^-1
MP,EX,13,29007547.5428236,	! slinch s^-2 in^-1
MP,NUXY,13,0.3,
MP,MURX,13,10000,

Temperature = 'TEMP' ! Temperature
MP,DENS,14,0.000734544492879577,	! slinch in^-3
MP,ALPX,14,6.66666666666667e-06,	! F^-1
MP,C,14,373722.969668162,	! in^2 s^-2 F^-1
MP,KXX,14,7.55607836445752,	! slinch in s^-3 F^-1
MP,RSVX,14,8.52348993288591,	! ohm cmil in^-1
MP,EX,14,29007547.5428236,	! slinch s^-2 in^-1
MP,NUXY,14,0.3,
MP,MURX,14,10000,

Temperature = 'TEMP' ! Temperature
MP,DENS,15,0.000734544492879577,	! slinch in^-3
MP,ALPX,15,6.66666666666667e-06,	! F^-1
MP,C,15,373722.969668162,	! in^2 s^-2 F^-1
MP,KXX,15,7.55607836445752,	! slinch in s^-3 F^-1
MP,RSVX,15,8.52348993288591,	! ohm cmil in^-1
MP,EX,15,29007547.5428236,	! slinch s^-2 in^-1
MP,NUXY,15,0.3,
MP,MURX,15,10000,

Temperature = 'TEMP' ! Temperature
MP,DENS,16,0.000734544492879577,	! slinch in^-3
MP,ALPX,16,6.66666666666667e-06,	! F^-1
MP,C,16,373722.969668162,	! in^2 s^-2 F^-1
MP,KXX,16,7.55607836445752,	! slinch in s^-3 F^-1
MP,RSVX,16,8.52348993288591,	! ohm cmil in^-1
MP,EX,16,29007547.5428236,	! slinch s^-2 in^-1
MP,NUXY,16,0.3,
MP,MURX,16,10000,

Temperature = 'TEMP' ! Temperature
MP,DENS,17,0.000734544492879577,	! slinch in^-3
MP,ALPX,17,6.66666666666667e-06,	! F^-1
MP,C,17,373722.969668162,	! in^2 s^-2 F^-1
MP,KXX,17,7.55607836445752,	! slinch in s^-3 F^-1
MP,RSVX,17,8.52348993288591,	! ohm cmil in^-1
MP,EX,17,29007547.5428236,	! slinch s^-2 in^-1
MP,NUXY,17,0.3,
MP,MURX,17,10000,

Temperature = 'TEMP' ! Temperature
MP,DENS,18,0.000734544492879577,	! slinch in^-3
MP,ALPX,18,6.66666666666667e-06,	! F^-1
MP,C,18,373722.969668162,	! in^2 s^-2 F^-1
MP,KXX,18,7.55607836445752,	! slinch in s^-3 F^-1
MP,RSVX,18,8.52348993288591,	! ohm cmil in^-1
MP,EX,18,29007547.5428236,	! slinch s^-2 in^-1
MP,NUXY,18,0.3,
MP,MURX,18,10000,

Temperature = 'TEMP' ! Temperature
MP,DENS,19,0.000734544492879577,	! slinch in^-3
MP,ALPX,19,6.66666666666667e-06,	! F^-1
MP,C,19,373722.969668162,	! in^2 s^-2 F^-1
MP,KXX,19,7.55607836445752,	! slinch in s^-3 F^-1
MP,RSVX,19,8.52348993288591,	! ohm cmil in^-1
MP,EX,19,29007547.5428236,	! slinch s^-2 in^-1
MP,NUXY,19,0.3,
MP,MURX,19,10000,

Temperature = 'TEMP' ! Temperature
MP,DENS,20,0.000734544492879577,	! slinch in^-3
MP,ALPX,20,6.66666666666667e-06,	! F^-1
MP,C,20,373722.969668162,	! in^2 s^-2 F^-1
MP,KXX,20,7.55607836445752,	! slinch in s^-3 F^-1
MP,RSVX,20,8.52348993288591,	! ohm cmil in^-1
MP,EX,20,29007547.5428236,	! slinch s^-2 in^-1
MP,NUXY,20,0.3,
MP,MURX,20,10000,

Temperature = 'TEMP' ! Temperature
MP,DENS,21,0.000734544492879577,	! slinch in^-3
MP,ALPX,21,6.66666666666667e-06,	! F^-1
MP,C,21,373722.969668162,	! in^2 s^-2 F^-1
MP,KXX,21,7.55607836445752,	! slinch in s^-3 F^-1
MP,RSVX,21,8.52348993288591,	! ohm cmil in^-1
MP,EX,21,29007547.5428236,	! slinch s^-2 in^-1
MP,NUXY,21,0.3,
MP,MURX,21,10000,

Temperature = 'TEMP' ! Temperature
MP,DENS,22,0.000734544492879577,	! slinch in^-3
MP,ALPX,22,6.66666666666667e-06,	! F^-1
MP,C,22,373722.969668162,	! in^2 s^-2 F^-1
MP,KXX,22,7.55607836445752,	! slinch in s^-3 F^-1
MP,RSVX,22,8.52348993288591,	! ohm cmil in^-1
MP,EX,22,29007547.5428236,	! slinch s^-2 in^-1
MP,NUXY,22,0.3,
MP,MURX,22,10000,

Temperature = 'TEMP' ! Temperature
MP,DENS,23,0.000734544492879577,	! slinch in^-3
MP,ALPX,23,6.66666666666667e-06,	! F^-1
MP,C,23,373722.969668162,	! in^2 s^-2 F^-1
MP,KXX,23,7.55607836445752,	! slinch in s^-3 F^-1
MP,RSVX,23,8.52348993288591,	! ohm cmil in^-1
MP,EX,23,29007547.5428236,	! slinch s^-2 in^-1
MP,NUXY,23,0.3,
MP,MURX,23,10000,

Temperature = 'TEMP' ! Temperature
MP,DENS,24,0.000734544492879577,	! slinch in^-3
MP,ALPX,24,6.66666666666667e-06,	! F^-1
MP,C,24,373722.969668162,	! in^2 s^-2 F^-1
MP,KXX,24,7.55607836445752,	! slinch in s^-3 F^-1
MP,RSVX,24,8.52348993288591,	! ohm cmil in^-1
MP,EX,24,29007547.5428236,	! slinch s^-2 in^-1
MP,NUXY,24,0.3,
MP,MURX,24,10000,

Temperature = 'TEMP' ! Temperature
MP,DENS,25,0.000734544492879577,	! slinch in^-3
MP,ALPX,25,6.66666666666667e-06,	! F^-1
MP,C,25,373722.969668162,	! in^2 s^-2 F^-1
MP,KXX,25,7.55607836445752,	! slinch in s^-3 F^-1
MP,RSVX,25,8.52348993288591,	! ohm cmil in^-1
MP,EX,25,29007547.5428236,	! slinch s^-2 in^-1
MP,NUXY,25,0.3,
MP,MURX,25,10000,

Temperature = 'TEMP' ! Temperature
MP,DENS,26,0.000734544492879577,	! slinch in^-3
MP,ALPX,26,6.66666666666667e-06,	! F^-1
MP,C,26,373722.969668162,	! in^2 s^-2 F^-1
MP,KXX,26,7.55607836445752,	! slinch in s^-3 F^-1
MP,RSVX,26,8.52348993288591,	! ohm cmil in^-1
MP,EX,26,29007547.5428236,	! slinch s^-2 in^-1
MP,NUXY,26,0.3,
MP,MURX,26,10000,

Temperature = 'TEMP' ! Temperature
MP,DENS,27,0.000734544492879577,	! slinch in^-3
MP,ALPX,27,6.66666666666667e-06,	! F^-1
MP,C,27,373722.969668162,	! in^2 s^-2 F^-1
MP,KXX,27,7.55607836445752,	! slinch in s^-3 F^-1
MP,RSVX,27,8.52348993288591,	! ohm cmil in^-1
MP,EX,27,29007547.5428236,	! slinch s^-2 in^-1
MP,NUXY,27,0.3,
MP,MURX,27,10000,

Temperature = 'TEMP' ! Temperature
MP,DENS,28,0.000734544492879577,	! slinch in^-3
MP,ALPX,28,6.66666666666667e-06,	! F^-1
MP,C,28,373722.969668162,	! in^2 s^-2 F^-1
MP,KXX,28,7.55607836445752,	! slinch in s^-3 F^-1
MP,RSVX,28,8.52348993288591,	! ohm cmil in^-1
MP,EX,28,29007547.5428236,	! slinch s^-2 in^-1
MP,NUXY,28,0.3,
MP,MURX,28,10000,

Temperature = 'TEMP' ! Temperature
MP,DENS,29,0.000734544492879577,	! slinch in^-3
MP,ALPX,29,6.66666666666667e-06,	! F^-1
MP,C,29,373722.969668162,	! in^2 s^-2 F^-1
MP,KXX,29,7.55607836445752,	! slinch in s^-3 F^-1
MP,RSVX,29,8.52348993288591,	! ohm cmil in^-1
MP,EX,29,29007547.5428236,	! slinch s^-2 in^-1
MP,NUXY,29,0.3,
MP,MURX,29,10000,

Temperature = 'TEMP' ! Temperature
MP,DENS,30,0.000734544492879577,	! slinch in^-3
MP,ALPX,30,6.66666666666667e-06,	! F^-1
MP,C,30,373722.969668162,	! in^2 s^-2 F^-1
MP,KXX,30,7.55607836445752,	! slinch in s^-3 F^-1
MP,RSVX,30,8.52348993288591,	! ohm cmil in^-1
MP,EX,30,29007547.5428236,	! slinch s^-2 in^-1
MP,NUXY,30,0.3,
MP,MURX,30,10000,

/com,*********** Send Beam Properties ***********
SECTYPE,1,BEAM,CTUB
SECDATA,0.122500000000002,0.187500000000006
secoffset,cent

SECTYPE,2,BEAM,CTUB
SECDATA,0.122500000000002,0.187500000000006
secoffset,cent

SECTYPE,3,BEAM,ASEC
SECDATA,0.186395999999998,2.81605006940276e-002,-1.4681636123798e-017,2.81605006940274e-002,4.49689841973419e-006,4.34307210599689e-002,8.28157823122508e-016,2.26447812733111e-015,-1.61223522824264e-011,3.23409570388222e-011
secoffset,cent

SECTYPE,4,BEAM,CTUB
SECDATA,0.326,0.375
secoffset,cent

SECTYPE,5,BEAM,CTUB
SECDATA,0.326,0.375
secoffset,cent

SECTYPE,6,BEAM,CTUB
SECDATA,0.326,0.375
secoffset,cent

SECTYPE,7,BEAM,CTUB
SECDATA,0.465,0.5
secoffset,cent

SECTYPE,8,BEAM,CTUB
SECDATA,0.465,0.5
secoffset,cent

SECTYPE,9,BEAM,CTUB
SECDATA,0.465,0.5
secoffset,cent

SECTYPE,10,BEAM,CTUB
SECDATA,0.435,0.5
secoffset,cent

SECTYPE,11,BEAM,CTUB
SECDATA,0.435,0.5
secoffset,cent

SECTYPE,12,BEAM,CTUB
SECDATA,0.435,0.5
secoffset,cent

SECTYPE,13,BEAM,CTUB
SECDATA,0.435,0.5
secoffset,cent

SECTYPE,14,BEAM,CTUB
SECDATA,0.435,0.5
secoffset,cent

SECTYPE,15,BEAM,CTUB
SECDATA,0.451,0.5
secoffset,cent

SECTYPE,16,BEAM,CTUB
SECDATA,0.451,0.5
secoffset,cent

SECTYPE,17,BEAM,CTUB
SECDATA,0.451,0.5
secoffset,cent

SECTYPE,18,BEAM,ASEC
SECDATA,0.186396000000164,2.81605210480297e-002,-5.17939020075429e-009,2.81605210480321e-002,4.53792502871317e-006,4.34307855467471e-002,3.03305741448206e-015,-2.24775552048092e-013,-9.71182803357331e-007,-9.75039558661492e-007
secoffset,cent

SECTYPE,19,BEAM,ASEC
SECDATA,0.186396000000012,2.81605055062222e-002,-2.35610299739679e-017,2.81605055062219e-002,4.40805675861226e-006,4.34307952253872e-002,-3.41348947304402e-014,4.35373727153417e-014,-1.67356563709632e-010,1.8587234817495e-010
secoffset,cent

SECTYPE,20,BEAM,CTUB
SECDATA,0.405,0.5
secoffset,cent

SECTYPE,21,BEAM,CTUB
SECDATA,0.405,0.5
secoffset,cent

SECTYPE,22,BEAM,CTUB
SECDATA,0.215,0.25
secoffset,cent

SECTYPE,23,BEAM,CTUB
SECDATA,0.215,0.25
secoffset,cent

SECTYPE,24,BEAM,ASEC
SECDATA,0.186395999999998,2.81605006940274e-002,-1.82254124043075e-017,2.81605006940264e-002,4.49689373090307e-006,4.34307210600475e-002,-6.45041492484315e-016,2.79309670528415e-015,-1.55726792052186e-011,3.17349142921434e-011
secoffset,cent

SECTYPE,25,BEAM,ASEC
SECDATA,0.186395999999997,2.81605006940274e-002,-1.43944078162868e-017,2.81605006940264e-002,4.4971519952494e-006,4.34307210599785e-002,-2.0741463696582e-016,1.85284890679391e-015,-1.52547363665564e-011,3.13422104815267e-011
secoffset,cent

SECTYPE,26,BEAM,ASEC
SECDATA,0.186395999999998,2.81605006940274e-002,-1.66650640310711e-017,2.81605006940264e-002,4.49688659109312e-006,4.3430721059985e-002,-6.45041492484315e-016,2.39013336307404e-015,-1.5459672095568e-011,3.15775269628448e-011
secoffset,cent

SECTYPE,27,BEAM,CTUB
SECDATA,0.2475,0.3125
secoffset,cent

SECTYPE,28,BEAM,CTUB
SECDATA,0.2475,0.3125
secoffset,cent

SECTYPE,29,BEAM,CTUB
SECDATA,0.2475,0.3125
secoffset,cent

SECTYPE,30,BEAM,CTUB
SECDATA,0.2475,0.3125
secoffset,cent

!************************* Model Summary ********************
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!Beam (Extracted Profile1),	Structural Steel,	matid,	30
!************************* End Model Summary ********************
/com,*********** Create Remote Point "Internal Remote Point" ***********
! -------- Remote Point Used by "Remote Force" --------
*set,tid,32
*set,cid,31
et,cid,175
et,tid,170
keyo,tid,2,1               ! Don't fix the pilot node
keyo,tid,4,0               ! Activate all DOF's due to rigid formulation on a straight edge
keyo,cid,12,5              ! Bonded Contact
keyo,cid,4,0               ! Rigid CERIG style load
keyo,cid,2,2               ! MPC style contact
mat,31
real,31
type,31
en,390,1
en,391,5
en,392,12
*set,_npilot,719
_npilot124=_npilot
type,tid
mat ,cid
real,cid
tshape,pilo
en,393,_npilot
tshape
/com,*********** Create Remote Point "Internal Remote Point 2" ***********
! -------- Remote Point Used by "Remote Force 2" --------
*set,tid,34
*set,cid,33
et,cid,175
et,tid,170
keyo,tid,2,1               ! Don't fix the pilot node
keyo,tid,4,0               ! Activate all DOF's due to rigid formulation on a straight edge
keyo,cid,12,5              ! Bonded Contact
keyo,cid,4,0               ! Rigid CERIG style load
keyo,cid,2,2               ! MPC style contact
mat,33
real,33
type,33
en,394,17
en,395,20
en,396,27
*set,_npilot,720
_npilot126=_npilot
type,tid
mat ,cid
real,cid
tshape,pilo
en,397,_npilot
tshape
/com,*********** Create Remote Point "Internal Remote Point 3" ***********
! -------- Remote Point Used by "Remote Displacement" --------
*set,_npilot,721
_npilot130=_npilot
et,35,170
type,35
real,35
mat,35
keyo,35,2,1         ! don't fix pilot node
keyo,35,4,111111
tshape,pilo
en,398,721        ! create pilot node for rigid link
tshape
en,399,721,20
/com,*********** Create Remote Point "Internal Remote Point 4" ***********
! -------- Remote Point Used by "Remote Displacement 2" --------
*set,_npilot,722
_npilot133=_npilot
et,36,170
type,36
real,36
mat,36
keyo,36,2,1         ! don't fix pilot node
keyo,36,4,111111
tshape,pilo
en,400,722        ! create pilot node for rigid link
tshape
en,401,722,41
/com,*********** Create Remote Point "Internal Remote Point 5" ***********
! -------- Remote Point Used by "Remote Displacement 3" --------
*set,_npilot,723
_npilot136=_npilot
et,37,170
type,37
real,37
mat,37
keyo,37,2,1         ! don't fix pilot node
keyo,37,4,111111
tshape,pilo
en,402,723        ! create pilot node for rigid link
tshape
en,403,723,60
/com,*********** Construct Remote Force ***********
/com,*********** Construct Remote Force ***********
/com,*********** Construct Remote Displacement ***********
/com,*********** Construct Remote Displacement ***********
/com,*********** Construct Remote Displacement ***********

/COM,*** Create a component for all remote displacements ***
CMBLOCK,REMOTEDISPALL,NODE,        3
(8i10)
       721       722       723

fini
/com,****************************************************************************
/com,*************************    SOLUTION       ********************************
/com,****************************************************************************
/solu
antype,0                   ! static analysis
_thickRatio=  0     ! Ratio of thick parts in the model
eqsl,sparse,,,,,1
cntr,print,1               ! print out contact info and also make no initial contact an error
cncheck,dmp		!	Enable program controlled contact splitting for distributed memory parallel run
dmpoption,emat,no             ! Don't combine emat file for DANSYS
dmpoption,esav,no             ! Don't combine esav file for DANSYS
nldiag,cont,iter           ! print out contact info each equilibrium iteration
rescontrol,,none                 ! Do not keep any restart files
/com,****************************************************
/com,******************* SOLVE FOR LS 1 OF 1 ****************
nsel,s,node,,719
f,all,fx,0.
f,all,fy,999.999999830492
f,all,fz,0.
nsel,s,node,,720
f,all,fx,0.
f,all,fy,-999.999999830492
f,all,fz,0.
nsel,all
d,721,uz,0.
d,722,ux,0.
d,722,uy,0.
d,722,uz,0.
d,722,rotx,0.
d,722,roty,0.
d,722,rotz,0.
d,723,ux,0.
d,723,uy,0.
d,723,uz,0.
nsub,1,1,1
time,1.
outres,erase
outres,all,none
outres,nsol,all,
outres,rsol,all
outres,eangl,all
outres,etmp,all
outres,veng,all
outres,strs,all,
outres,epel,all,
outres,eppl,all,
outres,cont,all,
esel,s,type,,1
esel,a,type,,2,30
cm,_elmisc,elem
esel,all
outres,misc,all,_elmisc
! *********** WB SOLVE COMMAND ***********
! check interactive state
*get,ANSINTER_,active,,int
*if,ANSINTER_,ne,0,then
/eof
*endif
solve
/com *************** Write FE CONNECTORS *********
CEWRITE,file,ce,,INTE
/com,****************************************************
/com,*************** FINISHED SOLVE FOR LS 1 *************
*get,_NSOLTHREADS,active,0,ntfs
*get,_NSOLPROCESSES,active,0,npfs
/post1
fini
