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/batch
! ANSYS input file written by Workbench version 2023 R1
! File used for geometry attach: C:\Users\czetch\AppData\Local\Temp\WB_czetch_12232_2\wbnew_files\dp0\SYS\DM\SYS.scdoc
/title,wbnew--Static Structural (A5)
/COM,/COM,     ANSYSMotion, 2023.1
/com,--- Data in consistent MKS units. See Solving Units in the help system for more information.
/units,MKS
/prep7
! Turn off shape checking because checks already performed inside WB mesher.
! See help system for more information.
SHPP,OFF,,NOWARN
etcon,set             ! allow ANSYS to choose best KEYOP's for 180x elements, resets any applicable keyopt to MAPDL defaults
/com,*********** Nodes for the whole assembly ***********
nblock,3,,23860
(1i9,3e20.9e3)
        1    -3.051639328E-12     4.864100000E-02    -1.699260000E-02
        2    -3.051639328E-12     9.398000000E-03    -1.699260000E-02
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-1
/com,*********** Elements for Body 1 "SYS\Solid1" ***********
et,1,187
eblock,19,solid,,12664
(19i9)
        1        1        1        1        0        0        0        0       10        0        1     2365     3375     2858     3118    18194    20519    18186    18190
    21356    20517
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-1
/com,*********** Send User Defined Coordinate System(s) ***********
csys,0
toffst,273.15,  ! Temperature offset from absolute zero
/com,*********** Set Reference Temperature ***********
tref,22.
/com,*********** Send Materials ***********
Temperature = 'TEMP' ! Temperature
MP,DENS,1,2770,	! kg m^-3
MP,ALPX,1,2.3e-05,	! C^-1
MP,C,1,875,	! J kg^-1 C^-1
MPTEMP,,,,,,,,
MPTEMP,1,-100
MPTEMP,2,0
MPTEMP,3,100
MPTEMP,4,200
MPDATA,KXX,1, ,114,144,165,175,	! W m^-1 C^-1
MPTEMP,,,,,,,,
MPTEMP,,,,,,,,
MPTEMP,1,0
MPTEMP,2,20
MPTEMP,3,100
MPDATA,RSVX,1, ,2.43e-08,2.67e-08,3.63e-08,	! kg m^3 A^-2 s^-3
MPTEMP,,,,,,,,
MP,EX,1,71000000000,	! Pa
MP,NUXY,1,0.33,
MP,MURX,1,1,

!************************* Model Summary ********************
!SYS\Solid1,	Aluminum Alloy,	matid,	1
!************************* End Model Summary ********************
/com,*********** Fixed Supports ***********
CMBLOCK,_FIXEDSU,NODE,      145
(8i10)
         1         2         3         4         5         6         7         8
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cmsel,s,_FIXEDSU
d,all,all
nsel,all
/com,*********** Define Force Using Surface Effect Elements ***********
local,12,0,0.,0.,0.,0.,0.,0.
csys,0
et,2,154
mat,2
eblock,10,,,3
(15i9)
    17185        2        2        2       12      574      602      604      604     6600     6783      604     6601
    17186        2        2        2       12      574      604      578      578     6601     6631      578     6599
    17187        2        2        2       12      602      603      604      604     6782     6787      604     6783
-1
esel,s,type,,2
keyop,2,2,1                ! Apply load in local coordinate system
keyop,2,7,1                ! Use original area so load is constant in large deformation
esel,all
/com,*********** Define Force Using Surface Effect Elements ***********
local,13,0,0.,0.,0.,0.,0.,0.
csys,0
et,3,154
mat,3
eblock,10,,,10
(15i9)
    17188        3        3        3       13      430      426      444      444     5974     5975      444     5998
    17189        3        3        3       13      443      446      444      444     6078     6083      444     6077
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-1
esel,s,type,,3
keyop,3,2,1                ! Apply load in local coordinate system
keyop,3,7,1                ! Use original area so load is constant in large deformation
esel,all
/com,*********** Define Force Without Surface Effect Elements "Force" ***********
local,14,0,0.,0.,0.,0.,0.,0.
csys,0
CMBLOCK,_CM32_1 ,ELEM,        7
(8i10)
      2429      2430      4627      5437      5439      9656     10487
CMBLOCK,_CM32_2 ,ELEM,        2
(8i10)
      4637      4640
CMBLOCK,_CM32_4 ,ELEM,        3
(8i10)
      4630      9654     12660
fini
/com,****************************************************************************
/com,*************************    SOLUTION       ********************************
/com,****************************************************************************
/solu
antype,0                   ! static analysis
_thickRatio=  1     ! Ratio of thick parts in the model
eqsl,pcg,1e-8,,,,,,1
cntr,print,1               ! print out contact info and also make no initial contact an error
dmpoption,emat,no             ! Don't combine emat file for DANSYS
dmpoption,esav,no             ! Don't combine esav file for DANSYS
nldiag,cont,iter           ! print out contact info each equilibrium iteration
rescontrol,,none                 ! Do not keep any restart files
/com,****************************************************
/com,******************* SOLVE FOR LS 1 OF 1 ****************
esel,s,type,,2
nsle
sfe,all,1,pres,1,-6200012.39924468
sfe,all,2,pres,1,0.
sfe,all,3,pres,1,-6200012.39924468
esel,s,type,,3
nsle
sfe,all,1,pres,1,9302746.39663481
sfe,all,2,pres,1,0.
sfe,all,3,pres,1,9302746.39663481
nsel,all
esel,all
/com,*********** Set Force Without Surface Effect Elements "Force" ***********
sfco,1,0,14,,,,,1		! set and send X component values
sfe,_CM32_1,1,pres,1,9394539.3947848
sfe,_CM32_2,2,pres,1,9394539.3947848
sfe,_CM32_4,4,pres,1,9394539.3947848
sfco,1,1,14,,,,,1		! set and send Y component values
sfe,_CM32_1,1,pres,1,0.
sfe,_CM32_2,2,pres,1,0.
sfe,_CM32_4,4,pres,1,0.
sfco,1,2,14,,,,,1		! set and send Z component values
sfe,_CM32_1,1,pres,1,-9394539.3947848
sfe,_CM32_2,2,pres,1,-9394539.3947848
sfe,_CM32_4,4,pres,1,-9394539.3947848
nsel,all
esel,all
sfco,none		! resets the sfcontrol
nsub,1,1,1
time,1.
outres,erase
outres,all,none
outres,nsol,all,
outres,rsol,all
outres,eangl,all
outres,etmp,all
outres,veng,all
outres,strs,all,
outres,epel,all,
outres,eppl,all,
outres,cont,all,
! *********** WB SOLVE COMMAND ***********
! check interactive state
*get,ANSINTER_,active,,int
*if,ANSINTER_,ne,0,then
/eof
*endif
solve
/com *************** Write FE CONNECTORS *********
CEWRITE,file,ce,,INTE
/com,****************************************************
/com,*************** FINISHED SOLVE FOR LS 1 *************
*get,_NSOLTHREADS,active,0,ntfs
*get,_NSOLPROCESSES,active,0,npfs
*get,_PCGITER,active,,solu,cgiter
/post1
fini
